# Geometry and Section Properties
L := 100 ft  # Span length
b_bb := 30 in  # Width of flange of basic beam
b_cb := 60 in  # Width of flange of composite beam
b_w := 6 in  # Width of web of precast section
γ_c := 150 pcf  # Unit weight of concrete
# Basic Beam
A_bb := 378 in^2  # Area of basic beam
I_bb := 72041 in^4  # Moment of inertia of basic beam
y_b := 22.27 in  # Distance from N.A. to bottom fiber of basic beam
S_b := I_bb/y_b
S_b = 3234.89 in^3
y_t := 17.73 in  # Distance from N.A. to top fiber of basic beam
S_t := I_bb/y_t
S_t = 4063.23 in^3
h_bb := y_b + y_t
# Composite Beam
A_cb := 631.8 in^2  # Area of composite beam
I_cb := 124243 in^4  # Moment of inertia of composite beam
y_bp := 28.68 in  # Distance from N.A. to bottom fiber of composite beam
S_bp := I_cb/y_bp
S_bp = 4332.04 in^3
y_tc := 13.32 in  # Distance from N.A. to top fiber of composite beam
S_tc := I_cb/y_tc
S_tc = 9327.55 in^3
h_cb := y_bp + y_tc
h_cb = 42 in
t_c := 5.5 in  # Thickness of topping
y_tp := h_bb - y_bp
y_tp = 11.32 in
S_tp := I_cb/y_tp
S_tp = 10975.5 in^3
y_bc := h_cb - t_c - y_bp
y_bc = 7.82 in
S_bc := I_cb/y_bc
S_bc = 15887.9 in^3
# Pretensioned Reinforcement Data
A_ps := 1.836 in^2  # Area of pretensioned reinforcement (12, 0.5 in. dia. straight low relaxation steel strands)
d_ps := 0.5 in  # Diameter of pretensioned straight low relaxation steel strands
e_ps_bb := y_b - 4*in  # Distance from cgc to cgs of strands of basic beam
e_ps_cb := y_bp - 4*in  # Distance from cgc to cgs of strands of composite beam
L_db_ps := 0 in  # Debond length
# Post-Tensioned Reinforcement Data
A_pt := 1.989 in^2  # Area of post-tensioned reinforcement (13, 0.5 in. dia. low relaxation steel strands)
d_pt := 0.5 in  # Diameter of post-tensioned low relaxation steel strands
y_h := 8 in  # Distance from bottom of beam to cgs of post-tensioned strands at low point of drape
e_pt_e_cb := y_bp - 36*in  # Distance from cgc to cgs of strands at end of composite beam
e_pt_c_cb := y_bp - 8*in  # Distance from cgc to cgs of strands at midspan of composite beam
L_db_pt := 0 in  # Debond length
# Material Properties
f'_c := 6500 psi  # Specified 28-day concrete compressive strength
E_c := 57000*sqrt(f'_c*psi)
E_c = 4595.49 ksi
f'_ci := 4500 psi  # Specified concrete compressive strength at prestress transfer
E_ci := 57000*sqrt(f'_ci*psi)
E_ci = 3823.68 ksi
f'_ct := 3500 psi  # Assumed 28-day concrete compressive strength of topping
E_ct := 57000*sqrt(f'_ct*psi)
E_ct = 3372.17 ksi
f_y := 60 ksi  # Specified yield strength of mild steel reinforcement
E_s := 29000 ksi  # Young's modulus of mild steel reinforcement
f_pu_ps := 270 ksi  # Specified ultimate tensile strength of pretensioned strands
f_pi_ps := 0.9*0.75*f_pu_ps
f_pi_ps = 182.25 ksi  # Initial prestress in pretensioned strands (after elastic loses)
f_se_ps := 0.75*f_pu_ps - 30*ksi
f_se_ps = 172.5 ksi  # Effective prestress in pretensioned strands (after all loses)
f_pu_pt := 270 ksi  # Specified ultimate tensile strength of post-tensioned strands
f_pi_pt := 0.9*0.8*f_pu_pt
f_pi_pt = 194.4 ksi  # Initial prestress in post-tensioned strands (after elastic loses)
f_se_pt := 0.6*f_pu_pt
f_se_pt = 162 ksi  # Effective prestress in post-tensioned strands (after all loses)
λ := 1.0  # Normal weight concrete
n_c := E_ct/E_c
n_c = 0.733799
# Loads
w_0_bb := A_bb*γ_c
w_0_bb = 393.75 plf  # Self weight of basic beam
w_0_cb := A_cb*γ_c
w_0_cb = 658.125 plf  # Self weight of composite beam
w_t := w_0_cb - w_0_bb
w_t = 264.375 plf  # Self weight of deck topping
w_DL := 250*plf  # Superimposed dead load
w_LL := 550*plf  # Live load
# Solution
# 1) Write equations for tendon profile and prestress over transfer length
ORIGIN := 0
Segments := 100  # Number of segments used to discretize beam
j := 0 .. Segments
Location :=
    Loc[0] ← 0*ft
    Loc[Segments] ← L
    SegLength ← L/Segments
    for i ∈ 0 .. (Segments - 2)
        Loc[i + 1] ← Loc[i] + SegLength
    Loc
# Equation for harped or parabolic tendon eccentricity
profile(e_e, e_c, L_h, L_d, L, drape) :=
    if drape == "harped"
        "harped tendon"
        for i ∈ 0 .. Segments
            if Location[i] < L_h
                ecc[i] ← (e_c - e_e)*Location[i]/L_h + e_e
            also if Location[i] > L - L_h
                ecc[i] ← (e_c - e_e)*(L - Location[i])/L_h + e_e
            else
                ecc[i] ← e_c
    if drape == "parabolic"
        "parabolic drape"
        for i ∈ 0 .. Segments
            ecc[i] ← (e_c - e_e)/(0.5*L)^2*(Location[i]*L - Location[i]^2) + e_e
    return ecc
# Equation for prestress over transfer length
PR(f_p, A_ps, L, L_t, L_db) :=
    Lo ← Location
    if L_db > 0
        "Strands are DEBONDED"
        for i ∈ 0 .. Segments
            if Lo[i] ≥ L_db + 2*L_t and Lo[i] ≤ L - L_db - 2*L_t
                PreForce[i] ← f_p*A_ps
            if L_db < Lo[i] < L_db + 2*L_t
                PreForce[i] ← (Lo[i] - L_db)/(2*L_t)*f_p*A_ps
            if L - L_db - 2*L_t < Lo[i] < L - L_db
                PreForce[i] ← (L - L_db - Lo[i])/(2*L_t)*f_p*A_ps
            if Lo[i] ≤ L_db or Lo[i] ≥ L - L_db
                PreForce[i] ← 0*kip
    else
        "Strands are FULLY BONDED"
        for i ∈ 0 .. Segments
            if Lo[i] ≥ L_t and Lo[i] ≤ L - L_t
                PreForce[i] ← f_p*A_ps
            if Lo[i] < L_t
                PreForce[i] ← Location[i]/L_t*f_p*A_ps
            if Lo[i] > L - L_t
                PreForce[i] ← (L - Location[i])/L_t*f_p*A_ps
    return PreForce
# 2) Service stresses of basic beam
# 2.1) Determine transfer length of pretensioned strands
L_t_ps := f_se_ps/(3000*psi)*d_ps
L_t_ps = 28.75 in
# 2.2) Plot variation in tendon profile and prestress of basic beam
e_ps_bb := profile(e_ps_bb, e_ps_bb, L*0.5, 0, L, "harped")  # Pretensioned strands eccentricity from centroid of basic beam
# [plot: -e_ps_bb (in) vs Location (ft)]
P_i_ps := PR(f_pi_ps, A_ps, L, L_t_ps, 0)  # Prestress force of pretensioned strands immediately after transfer
P_e_ps := PR(f_se_ps, A_ps, L, L_t_ps, 0)
# [plot: P_i_ps (kip), P_e_ps (kip) vs Location (ft)]
# Prestress force of pretensioned strands after all losses
max(P_i_ps) = 334.611 kip
max(P_e_ps) = 316.71 kip
# 2.3) Plot stress state for prestress transfer of pretensioned strands of the basic beam
# Stress nomenclature:
# fabc
# a = top (t) or bottom (b) of
# b = precast (p) or topping (c)
# c = load stage number
# Span is assumed to be from end to end of beam
M(w) :=
    for i ∈ 0 .. Segments
        M[i] ← 0.5*w*(Location[i]*L - Location[i]^2)
    return M
# Load Stage 1 - Prestress Transfer of pretensioned strands
# Stress at top and bottom of basic beam after release
f_tp1 := vectorize(P_i_ps/A_bb - (P_i_ps*e_ps_bb)/S_t + M(w_0_bb)/S_t)
max(f_tp1) = 834.247 psi
min(f_tp1) = -450.142 psi
f_bp1 := vectorize(P_i_ps/A_bb + (P_i_ps*e_ps_bb)/S_b - M(w_0_bb)/S_b)
max(f_bp1) = 2562.51 psi
min(f_bp1) = 0 psi
# Allowable stresses
Lend := 0.25*L  # Define "end" of beam
f_max :=
    for i ∈ 0 .. Segments
        if Location[i] > Lend and Location[i] < L - Lend
            f[i] ← 0.6*f'_ci
        else
            f[i] ← 0.8*f'_ci
    f  # Allowable compression (24.5.4.1)
f_min :=
    for i ∈ 0 .. Segments
        if Location[i] > Lend and Location[i] < L - Lend
            f[i] ← -3*sqrt(f'_ci*psi)
        else
            f[i] ← -0.8*f'_ci
    f  # Allowable tension (24.5.4.1)
# [plot: f_tp1 (psi), f_bp1 (psi), f_max (psi), f_min (psi) vs Location (ft)]
# 3) Service stresses of composite beam
# 3.1) Plot variation in tendon profile and prestress of composite beam
e_ps_cb := profile(e_ps_cb, e_ps_cb, L*0.5, 0, L, "harped")  # Pretensioned strands eccentricity from centroid of composite beam
e_pt_cb := profile(e_pt_e_cb, e_pt_c_cb, L*0.5, 0, L, "parabolic")  # Post-tensioned strands eccentricity from centroid of composite beam
# [plot: -e_ps_cb (in), -e_pt_cb (in) vs Location (ft)]
P_i_pt := PR(f_pi_pt, A_pt, L, 0, 0)  # Prestress force of post-tensioned strands immediately after transfer
P_e_pt := PR(f_se_pt, A_pt, L, 0, 0)  # Prestress force of post-tensioned strands after all losses
# [plot: P_i_ps (kip), P_e_ps (kip), P_i_pt (kip), P_e_pt (kip) vs Location (ft)]
max(P_i_pt) = 386.662 kip
max(P_e_pt) = 322.218 kip
# 3.2) Plot stress state for prestress transfer of pretensioned and post-tensioned strands of composite beam
# Load Stage 2 - Deck cast (unshored) and prestress transfer of post-tensioned strands
# Stress at top and bottom of precast and deck after deck is placed and post-tension released
f_tp2 := vectorize(P_e_ps/A_bb + P_i_pt/A_bb - (P_e_ps*e_ps_cb)/S_t - (P_i_pt*e_pt_cb)/S_t + M(w_t)/S_t)
max(f_tp2) = 1719.49 psi
min(f_tp2) = -1054.88 psi
f_bp2 := vectorize(P_e_ps/A_bb + P_i_pt/A_bb + (P_e_ps*e_ps_cb)/S_b + (P_i_ps*e_pt_cb)/S_b - M(w_t)/S_b)
max(f_bp2) = 5190.26 psi
min(f_bp2) = 1022.91 psi
f_tc2[j] := 0 psi
max(f_tc2) = 0 psi
min(f_tc2) = 0 psi
f_bc2[j] := 0 psi
max(f_bc2) = 0 psi
min(f_bc2) = 0 psi
# [plot: f_tp2 (psi), f_bp2 (psi), f_tc2 (psi), f_bc2 (psi) vs Location (ft)]
# Load Stage 3 - Erection (unshored)
# Stress at top and bottom of precast and deck at the time of erection (includes long-term losses)
P_e := P_e_ps + P_e_pt
f_tp3 := vectorize(P_e/A_bb - (P_e_ps*e_ps_cb)/S_t - (P_e_pt*e_pt_cb)/S_t + M(w_t)/S_tp)
max(f_tp3) = 1432.91 psi
min(f_tp3) = -1512.04 psi
f_bp3 := vectorize(P_e/A_bb + (P_e_ps*e_ps_cb)/S_b + (P_e_ps*e_pt_cb)/S_b - M(w_t)/S_bp)
max(f_bp3) = 5215.81 psi
min(f_bp3) = 852.429 psi
f_tc3[j] := 0 psi
max(f_tc3) = 0 psi
min(f_tc3) = 0 psi
f_bc3[j] := 0 psi
max(f_bc3) = 0 psi
min(f_bc3) = 0 psi
# [plot: f_tp3 (psi), f_bp3 (psi), f_tc3 (psi), f_bc3 (psi) vs Location (ft)]
# Load Stage 4 - Dead + Live Load (unshored)
# Stress at top and bottom of precast with all service loads in place
f_tp4 := vectorize(P_e/A_bb - (P_e_ps*e_ps_cb)/S_t - (P_e_pt*e_pt_cb)/S_t + M(w_t)/S_t + M(w_LL + w_DL)/S_tp)
max(f_tp4) = 1432.91 psi
min(f_tp4) = 195.967 psi
f_bp4 := vectorize(P_e/A_bb + (P_e_ps*e_ps_cb)/S_t + (P_e_pt*e_pt_cb)/S_t - M(w_t)/S_b - M(w_LL + w_DL)/S_bp)
max(f_bp4) = 2826.83 psi
min(f_bp4) = 271.945 psi
f_tc4 := M(w_LL + w_DL)/S_tc*n_c
max(f_tc4) = 944.041 psi
min(f_tc4) = 0 psi
f_bc4 := M(w_LL + w_DL)/S_bc*n_c
max(f_bc4) = 554.234 psi
min(f_bc4) = 0 psi
# Allowable Stresses
f_max :=
    for i ∈ 0 .. Segments
        f[i, 0] ← 0.45*f'_c
        f[i, 1] ← 0.6*f'_c
    f  # Allowable compression (24.5.4.1)
# Classification (ACI 24.5.2.1)
f_U :=
    for i ∈ 0 .. Segments
        f[i] ← -7.5*sqrt(f'_c*psi)
    f
f_U[1] = -604.669 psi  # Class U (uncracked)
f_C :=
    for i ∈ 0 .. Segments
        f[i] ← -12*sqrt(f'_c*psi)
    f
f_C[1] = -967.471 psi  # Class C (cracked)
# [plot: f_tp4 (psi), f_bp4 (psi), f_tc4 (psi), f_bc4 (psi), f_U (psi), f_C (psi), f_max (psi) vs Location (ft)]
# Section is uncracked (Class U)
# 4) Flexural Strength
# 4.1) Check prestress to determine if empirical equation can be used or to use strain compatibility
CheckPrestress_ps :=
    if f_pu_ps*0.5 ≤ f_se_ps
        "Prestress is sufficient to use empirical equation"
    if f_pu_ps*0.5 > f_se_ps
        "WARNING: Prestress is INSUFFICIENT to use empirical equation"
CheckPrestress_ps = "Prestress is sufficient to use empirical equation"
CheckPrestress_pt :=
    if f_pu_pt*0.5 ≤ f_se_pt
        "Prestress is sufficient to use empirical equation"
    if f_pu_pt*0.5 > f_se_pt
        "WARNING: Prestress is INSUFFICIENT to use empirical equation"
CheckPrestress_pt = "Prestress is sufficient to use empirical equation"
β_one(f'_c) :=
    if f'_c ≤ 4000 psi
        0.85
    also if f'_c > 4000 psi and f'_c < 8000 psi
        0.85 - (0.05*(f'_c - 4000 psi)/(1000 psi))
    else
        0.65  # Relationship between depth of equivalent stress block and depth of N.A. is a function of concrete strength (22.2.2.4.1)
β_1 := β_one(f'_ct)
β_1 = 0.85
# 4.2) Determine stress in pretensioned and post-tensioned strands at flexural strength using ACI empirical equation for fps
b_eff := b_cb*n_c = 44.028 in
γ_p := 0.28  # fpy/fpu > 90 for prestressing strand
d_p_ps := e_ps_cb + y_tp
d_p_ps := max(d_p_ps) = 36 in
d_p_pt := e_pt_cb + y_tp
d_p_pt := max(d_p_pt) = 32 in
ρ_p_ps := A_ps/(b_eff*d_p_ps)
ρ_p_pt := A_pt/(b_eff*d_p_pt)
ρ := 0  # No mild steel in section, so rho and rho' are zero
ρ' := 0
CS_ps := ρ_p_ps*f_pu_ps/f'_c
CS_ps = 0.0481163
fps_ps := f_pu_ps*(1 - γ_p/β_1*CS_ps)
fps_ps = 265.72 ksi
CS_pt := ρ_p_pt*f_pu_pt/f'_c
CS_pt = 0.0586417
fps_pt := f_pu_pt*(1 - γ_p/β_1*CS_pt)
fps_pt = 264.784 ksi
# 4.3) Determine development length using fps from ACI empirical equation (25.4.8.1)
L_d_ps := L_t_ps + (fps_ps - f_se_ps)/(1000*psi)*d_ps
L_d_ps = 75.3602 in
L_d_pt := (fps_pt - f_se_pt)/(1000*psi)*d_ps
L_d_pt = 51.3922 in
# 4.4) Determine fps and PHI for flexural calculations
PS(fps, fse, A_ps, L, L_t, L_d, L_db) :=
    Lo ← Location
    Dfps ← fps - fse
    if L_db > 0
        L_t ← L_t*2
        L_d ← L_d*2
    pL_t ← L_t + L_db
    pL_d ← L_d + L_db
    for i ∈ 0 .. Segments*0.5
        if Lo[i] ≤ L_db
            PS[i] ← 0 psi
        if L_db < Lo[i] ≤ pL_t
            PS[i] ← (Lo[i] - L_db)/L_t*fse*A_ps
        if pL_t < Lo[i] ≤ pL_d
            PS[i] ← ((Lo[i] - L_db - L_t)/(L_d - L_t)*Dfps + fse)*A_ps
        if Lo[i] > pL_d
            PS[i] ← fps*A_ps
        PS[Segments - i] ← PS[i]
    return PS
Phi(L, L_t, L_d, L_db) :=
    Lo ← Location
    if L_db > 0
        L_t ← L_t*2
        L_d ← L_d*2
    pL_t ← L_t + L_db
    pL_d ← L_d + L_db
    for i ∈ 0 .. Segments*0.5
        if Lo[i] ≤ pL_t
            Phi[i] ← 0.75
        if pL_t < Lo[i] ≤ pL_d
            Phi[i] ← (Lo[i] - L_t - L_db)/(L_d - L_t)*(0.9 - 0.75) + 0.75
        if Lo[i] > pL_d
            Phi[i] ← 0.9
        Phi[Segments - i] ← Phi[i]
    return Phi
f_ps_ps := PS(fps_ps, f_se_ps, 1, L, L_t_ps, L_d_ps, L_db_ps)
# Variation in stress of pretensioned tendon at flexural strength as a function of position along the length of the member
f_ps_pt := PS(fps_pt, f_se_pt, 1, L, 0, L_d_pt, L_db_pt)
# Variation in stress of post-tensioned tendon at flexural strength as a function of position along the length of the member
PHI_ps := Phi(L, L_t_ps, L_d_ps, L_db_ps)
# Variation in phi factor for pretensioned tendon as a function of position along the length of the member within the development length
PHI_pt := Phi(L, 0, L_d_pt, L_db_pt)
# Variation in phi factor for post-tensioned tendon as a function of position along the length of the member within the development length
# [plot: f_ps_ps (ksi), f_ps_pt (ksi) vs Location (ft)]
# [plot: PHI_ps, PHI_pt vs Location (ft)]
# 4.5) Use equilibrium to determine flexural strength
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a_ps := (f_ps_ps*A_ps)/(0.85*f'_c*b_eff)
max(a_ps) = 2.00557 in
a_pt := (f_ps_pt*A_pt)/(0.85*f'_c*b_eff)
max(a_pt) = 2.16504 in
a := max(a_ps) + max(a_pt) = 4.17061 in
h_f := 5.5 in  # Check if depth of the stress block (a) is less than the thickness of the deck (hf)
ε_empirical_ps := 0.003*((β_1*max(d_p_ps))/max(a_ps) - 1)
ε_empirical_ps = 0.0427726  # Strain in the prestressing pretensioned steel is greater than 0.005 so the phi factor is 0.9 (ACI 21.2.2)
ε_empirical_pt := 0.003*((β_1*max(d_p_pt))/max(a_pt) - 1)
ε_empirical_pt = 0.0346898  # Strain in the prestressing post-tensioned steel is greater than 0.005 so the phi factor is 0.9 (ACI 21.2.2)
ϕM_n_ps := vectorize(PHI_ps*f_ps_ps*A_ps*(d_p_ps - a_ps/2))
max(ϕM_n_ps) = 1280.54 kip*ft  # Design moment strength due to pretnesioned tendon at midspan
ϕM_n_pt := vectorize(PHI_pt*f_ps_pt*A_pt*(d_p_pt - a_pt/2))
max(ϕM_n_pt) = 1221.22 kip*ft  # Design moment strength due to post-tensioned tendon at midspan
ϕM_n := ϕM_n_ps + ϕM_n_pt
max(ϕM_n) = 2501.75 kip*ft  # Design moment strength at midspan
# 4.6) Plot design flexural strength along the length of the member and compare it to the factored moment and minimum reinforcement requirements of ACI
# Span is assumed to be from end to end of beam
M(w) :=
    for i ∈ 0 .. Segments
        M[i] ← 0.5*w*(Location[i]*L - Location[i]^2)
    M
w_u := 1.2*(w_DL + w_0_cb) + 1.6*w_LL
w_u = 1.96975 klf  # Factored uniform load
M_u := M(w_u)
max(M_u) = 2462.19 kip*ft  # Moment strength (phiMn) is greater than factored moment (Mu). Moment capacity of memeber is SUFFIECIENT.
f_r := 7.5*sqrt(f'_c*psi)
M_cr := vectorize(S_bp*(P_e/A_cb + (P_e_ps*e_ps_cb)/S_bp + (P_e_pt*e_pt_cb)/S_bp + f_r))
max(1.2*M_cr) = 2148.02 kip*ft
# Design moment strength is greater than max(1.2*Mcr), which satisfies the minimum reinforcement requirements of ACI
# [plot: ϕM_n (kip*ft), M_u (kip*ft), M_cr (kip*ft) vs Location (ft)]
# 5) Shear Strength
ϕ := 0.75  # Strength reduction factor for shear
# 5.1) Determine transfer length
L_t_ps := 50*d_ps
L_t_ps = 25 in  # ACI 22.5.9.1
# 5.2) Determine shear envelope
V(w) :=
    for i ∈ 0 .. Segments
        V[i] ← (w*L)/2 - w*Location[i]
    V
V_Env(w) :=
    for i ∈ 0 .. Segments
        V_Env[i] ← |(w*L)/2 - w*Location[i]|
    V_Env
V_u := V(w_u)
V_uEnv := V_Env(w_u)
# 5.3) Determine effective depth
d_p_ps := e_ps_cb + y_tc
d_p_pt := e_pt_cb + y_tc
d_v :=
    for i ∈ 0 .. Segments
        dp[i] ← max(d_p_ps[i], d_p_pt[i], 0.8*h_cb)
    return dp  # Effective depth for calculating shear strength (not taken less than 0.8h)
# [plot: -d_v (in), -d_p_ps (in), -d_p_pt (in) vs Location (ft)]
max(d_v) = 38 in
# 5.4) Determine concrete contribution considering flexure-shear cracking (Vci)
f_r := 6*sqrt(f'_c*psi) = 483.735 psi  # Modulus of rupture
V_c2 := 1.7*sqrt(f'_c*psi)*b_w*d_v  # Minimum shear strength contributed by concrete
V_ci :=
    for i ∈ 0 .. Segments
        if M_u[i] > 0 or M_u[i] < 0
            V_over_M ← |V_u[i]|/|M_u[i]|
            Vc[i] ← max(0.6*λ*sqrt(f'_c*psi)*b_w*d_v[i] + V_over_M*M_cr[i], V_c2[i])
        else
            Vc[i] ← NaN
    return Vc
# [plot: V_ci (kip) vs Location (ft)]
# 5.5) Determine concrete contribution considering web-shear cracking (Vcw)
V_p :=
    d_p(x) ← linterp(Location, e_pt_cb + y_tc, x)
    slope(x) ← d/dx(d_p(x))
    for i ∈ 0 .. Segments
        VP[i] ← P_e_pt[i]*|sin(atan(slope(Location[i])))|
    return VP
# Calculates the vertical component of the prestress force in sloped tendons. Assumes that the tendon contributes to shear strength by taking the absolute value of the slope.
# Check location of critical section according to 11.4.3
h_cb/2 = 21 in
L_t_ps = 25 in
# Critical section lies within the transfer length
# (h/2 < Lt)
f_pc := P_e/A_cb  # Prestress considered for reduced stress over the transfer length (22.5.9.3)
V_cw := vectorize((3.5*λ*sqrt(f'_c*psi) + 0.3*f_pc)*b_w*d_v + V_p)
# Reduced shear strength provided by concrete where diagonal cracking occurs in the web of the critical section (22.5.8.3)
# [plot: V_cw (kip) vs Location (ft)]
# [plot: V_ci (kip), V_uEnv/ϕ (kip), V_cw (kip) vs Location (ft)]
V_c :=
    for i ∈ 0 .. Segments
        if V_cw[i] > V_ci[i]
            Vmin[i] ← V_ci[i]
        else
            Vmin[i] ← V_cw[i]
    Vmin
# [plot: V_c (kip), V_uEnv/ϕ (kip) vs Location (ft)]
V_uDesign := vectorize(V_uEnv/ϕ - V_c)
max(V_uDesign) = 12.02 kip  # Maximum required shear
CheckSection :=
    for i ∈ 0 .. Segments
        if V_uDesign[i] ≤ 8*λ*sqrt(f'_c*psi)*b_w*d_v[i]
            SectionSize ← "Section size is adequate"
        if V_uDesign[i] > 8*λ*sqrt(f'_c*psi)*b_w*d_v[i]
            SectionSize ← "WARNING: section size is INSUFFICIENT"
    return SectionSize
CheckSection = "Section size is adequate"
V_max := 8*λ*sqrt(f'_c*psi)*b_w*d_v
max(V_max) = 147.056 kip
# Check to ensure section size is adequate based on the required shear strength being less than the maximum shear strength that can be provided by stirrups according to ACI 22.5.1.2.
# [plot: V_uDesign (kip) vs Location (ft)]
# 5.6) Determine shear reinforcement required for strength
A_v := 0.11*in^2
# #3 mild steel reinforcing bars
# (PCI Design Manual Table 15.4.1)
b_v := 30 in  # Width of contact area
f_yt := 60*ksi  # ASTM A706 Grade 60 Deformed Bar (Table 20.2.2.4a)
s :=
    for i ∈ 0 .. Segments
        if V_uDesign[i] > 0
            smax[i] ← (A_v*f_yt*d_v[i])/V_uDesign[i]
        else
            smax[i] ← NaN
    return smax  # Rearrange ACI equation 22.5.10.5.3 to calculate longitudinal spacing of shear reinforcement
# [plot: s (in) vs Location (ft)]
# 5.7) Determine shear spacing limits and minimum shear reinforcement requirements
s_max1 :=
    for i ∈ 0 .. Segments
        if V_uDesign[i] ≤ 4*sqrt(f'_c*psi)*b_w*d_v[i]
            smax[i] ← min(0.75*h_cb, 24*in)
        if V_uDesign[i] > 4*sqrt(f'_c*psi)*b_w*d_v[i]
            smax[i] ← 0.5*min(0.75*h_cb, 24*in)
        if V_uEnv[i]/ϕ ≤ 0.5*V_c[i]
            smax[i] ← NaN
    return smax  # Spacing limits Table 9.7.6.2.2
f_pu := 270 ksi
A_prestressed := A_ps + A_pt
s_max2 :=
    for i ∈ 0 .. Segments
        if V_uEnv[i]/ϕ > 0.5*V_c[i]
            smax[i] ← max((A_v*f_yt)/(0.75*b_w*sqrt(f'_c*psi)), (80*f_yt*d_v[i]*A_v)/(A_prestressed*f_pu)*sqrt(b_w/d_v[i]))
        if V_uEnv[i]/ϕ ≤ 0.5*V_c[i]
            smax[i] ← NaN
    return smax  # Minimum reinforcement Table 9.6.3.3
(A_v*f_yt)/(0.75*b_w*sqrt(f'_c*psi)) = 18.1918 in
(80*f_yt*max(d_v)*A_v)/(A_prestressed*f_pu)*sqrt(b_w/max(d_v)) = 7.7198 in
# [plot: s_max1 (in), s_max2 (in), s (in) vs Location (in)]
# 5.8) Lay out stirrups
L_bL := 0 in
L_bR := 0 in
s := [12, 18, 0, 0, 0, 0, 0, 0, 0, 18, 12]*in
s := transpose(s)
ns := [2, 32, 0, 0, 0, 0, 0, 0, 0, 32, 2]
ns := transpose(ns)
Ls := vectorize(s*ns)
sum(Ls) = 100 ft
L = 100 ft
Ls :=
    sum ← 0
    for i ∈ 0 .. 10
        sum ← Ls[i] + sum
        Ls[i] ← sum
    return Ls
V_n :=
    for i ∈ 0 .. Segments
        if Location[i] < Ls[1]
            Vn[i] ← V_c[i] + (A_v*f_yt*d_v[i])/s[1]
        for j ∈ 1 .. 8
            if Location[i] < Ls[j + 1] and Location[i] ≥ Ls[j]
                Vn[i] ← V_c[i] + (A_v*f_yt*d_v[i])/s[j + 1]
        if Location[i] ≥ Ls[8]
            Vn[i] ← V_c[i] + (A_v*f_yt*d_v[i])/s[9]
    return Vn
CheckShear(Vn, VuPhi) :=
    DRmin ← 1
    for i ∈ 0 .. Segments
        if Vn[i] < VuPhi[i] and Location[i] > L_bL and Location[i] < L - L_bR
            if Vn[i]/VuPhi[i] < DRmin
                Lmin ← Location[i]
                DRmin ← Vn[i]/VuPhi[i]
            continue
        continue
    if DRmin < 1
        CS ← "Shear strength is INADEQUATE. DR = "
        CS ← concat(CS, substr(num2str(DRmin), 0, 5))
        CS ← concat(CS, " at Location = ")
        CS ← concat(CS, substr(num2str(Lmin/ft), 0, 5), "ft")
        return CS
    else
        "Shear strength is adequate."
DR(Vn, VuPhi) :=
    for i ∈ 0 .. Segments
        if Location[i] > L_bL and Location[i] < L - L_bR
            DR[i] ← Vn[i]/VuPhi[i]
        else
            DR[i] ← NaN
    return DR
# [plot: V_n (kip), V_uEnv/ϕ (kip) vs Location (ft)]
CheckShear(V_n, V_uEnv/ϕ) = "Shear strength is adequate."
